# OpenSim document version 20302
ForwardTool arm26:
  model_file: arm26.osim
  replace_force_set: false
  results_directory: NonphysiologicalResults
  output_precision: 8
  initial_time: 0
  final_time: 1
  solve_for_equilibrium_for_auxiliary_states: true
  maximum_number_of_integrator_steps: 30000
  maximum_integrator_step_size: 1
  minimum_integrator_step_size: 0.00000001
  integrator_error_tolerance: 0.00001
  ControllerSet Controllers:
    ControlSetController: controls_file=../StaticOptimization/NonphysiologicalResults/arm26_StaticOptimization_controls.xml
