# OpenSim document version 30000
InverseKinematicsTool:
  results_directory: ./
  model_file: ../subject01.osim
  constraint_weight: Inf
  accuracy: 1e-5
  marker_file: ../ExperimentalData/subject01_walk.trc
  time_range: 0 2.5
  report_errors: true
  output_motion_file: subject01_walk_IK.mot
  report_marker_locations: false
  IKTaskSet:
    IKMarkerTask Sternum: apply=true weight=1
    IKMarkerTask R.Acromium: apply=true weight=1
    IKMarkerTask L.Acromium: apply=true weight=1
    IKMarkerTask Top.Head: apply=true weight=3
    IKMarkerTask R.ASIS: apply=true weight=3
    IKMarkerTask L.ASIS: apply=true weight=3
    IKMarkerTask V.Sacral: apply=true weight=3
    IKMarkerTask R.Thigh.Upper: apply=true weight=1
    IKMarkerTask R.Thigh.Front: apply=true weight=1
    IKMarkerTask R.Thigh.Rear: apply=true weight=1
    IKMarkerTask R.Knee.Lat: apply=false weight=1
    IKMarkerTask R.Knee.Med: apply=false weight=1
    IKMarkerTask R.Shank.Upper: apply=true weight=1
    IKMarkerTask R.Shank.Front: apply=true weight=1
    IKMarkerTask R.Shank.Rear: apply=true weight=1
    IKMarkerTask R.Ankle.Lat: apply=false weight=1
    IKMarkerTask R.Ankle.Med: apply=false weight=1
    IKMarkerTask R.Heel: apply=true weight=2
    IKMarkerTask R.Midfoot.Sup: apply=true weight=1
    IKMarkerTask R.Midfoot.Lat: apply=true weight=1
    IKMarkerTask R.Toe.Lat: apply=true weight=1
    IKMarkerTask R.Toe.Med: apply=true weight=1
    IKMarkerTask R.Toe.Tip: apply=true weight=2
    IKMarkerTask L.Thigh.Upper: apply=true weight=1
    IKMarkerTask L.Thigh.Front: apply=true weight=1
    IKMarkerTask L.Thigh.Rear: apply=true weight=1
    IKMarkerTask L.Knee.Lat: apply=false weight=1
    IKMarkerTask L.Knee.Med: apply=false weight=1
    IKMarkerTask L.Shank.Upper: apply=true weight=1
    IKMarkerTask L.Shank.Front: apply=true weight=1
    IKMarkerTask L.Shank.Rear: apply=true weight=1
    IKMarkerTask L.Ankle.Lat: apply=false weight=1
    IKMarkerTask L.Ankle.Med: apply=false weight=1
    IKMarkerTask L.Heel: apply=true weight=2
    IKMarkerTask L.Midfoot.Sup: apply=true weight=1
    IKMarkerTask L.Midfoot.Lat: apply=true weight=1
    IKMarkerTask L.Toe.Lat: apply=true weight=1
    IKMarkerTask L.Toe.Med: apply=true weight=1
    IKMarkerTask L.Toe.Tip: apply=true weight=2
