# OpenSim document version 20302
ControlSet Control Set:
  defaults: ControlLinear default: is_model_control=true extrapolate=true default_min=0.02 default_max=1
      filter_on=false use_steps=true kp=100 kv=20
  ControlLinear [values shared by the 77 below unless stated]: is_model_control=true extrapolate=true default_max=1
      filter_on=false kp=100 kv=20 use_steps=true default_min=0.02
  ControlLinear FX.excitation: default_min=-1 use_steps=false
  ControlLinear FY.excitation: default_min=-1 use_steps=false
  ControlLinear FZ.excitation: default_min=-1 use_steps=false
  ControlLinear MX.excitation: default_min=-1 use_steps=false
  ControlLinear MY.excitation: default_min=-1 use_steps=false
  ControlLinear MZ.excitation: default_min=-1 use_steps=false
  ControlLinear hip_flexion_r_reserve.excitation: default_min=-1000 default_max=1000
  ControlLinear hip_adduction_r_reserve.excitation: default_min=-1000 default_max=1000
  ControlLinear hip_rotation_r_reserve.excitation: default_min=-1000 default_max=1000
  ControlLinear knee_angle_r_reserve.excitation: default_min=-1000 default_max=1000
  ControlLinear ankle_angle_r_reserve.excitation: default_min=-1000 default_max=1000
  ControlLinear subtalar_angle_r_reserve.excitation: default_min=-1000 default_max=1000
  ControlLinear mtp_angle_r_reserve.excitation: default_min=-1
  ControlLinear hip_flexion_l_reserve.excitation: default_min=-1000 default_max=1000
  ControlLinear hip_adduction_l_reserve.excitation: default_min=-1000 default_max=1000
  ControlLinear hip_rotation_l_reserve.excitation: default_min=-1000 default_max=1000
  ControlLinear knee_angle_l_reserve.excitation: default_min=-1000 default_max=1000
  ControlLinear ankle_angle_l_reserve.excitation: default_min=-1000 default_max=1000
  ControlLinear subtalar_angle_l_reserve.excitation: default_min=-1000 default_max=1000
  ControlLinear mtp_angle_l_reserve.excitation: default_min=-1
  ControlLinear lumbar_extension_reserve.excitation: default_min=-1000 default_max=1000
  ControlLinear lumbar_bending_reserve.excitation: default_min=-1000 default_max=1000
  ControlLinear lumbar_rotation_reserve.excitation: default_min=-1000 default_max=1000
  ControlLinear glut_med1_r.excitation
  ControlLinear glut_med2_r.excitation
  ControlLinear glut_med3_r.excitation
  ControlLinear bifemlh_r.excitation
  ControlLinear bifemsh_r.excitation
  ControlLinear sar_r.excitation
  ControlLinear add_mag2_r.excitation
  ControlLinear tfl_r.excitation
  ControlLinear pect_r.excitation
  ControlLinear grac_r.excitation
  ControlLinear glut_max1_r.excitation
  ControlLinear glut_max2_r.excitation
  ControlLinear glut_max3_r.excitation
  ControlLinear iliacus_r.excitation
  ControlLinear psoas_r.excitation
  ControlLinear quad_fem_r.excitation
  ControlLinear gem_r.excitation
  ControlLinear peri_r.excitation
  ControlLinear rect_fem_r.excitation
  ControlLinear vas_int_r.excitation
  ControlLinear med_gas_r.excitation
  ControlLinear soleus_r.excitation
  ControlLinear tib_post_r.excitation
  ControlLinear tib_ant_r.excitation
  ControlLinear glut_med1_l.excitation
  ControlLinear glut_med2_l.excitation
  ControlLinear glut_med3_l.excitation
  ControlLinear bifemlh_l.excitation
  ControlLinear bifemsh_l.excitation
  ControlLinear sar_l.excitation
  ControlLinear add_mag2_l.excitation
  ControlLinear tfl_l.excitation
  ControlLinear pect_l.excitation
  ControlLinear grac_l.excitation
  ControlLinear glut_max1_l.excitation
  ControlLinear glut_max2_l.excitation
  ControlLinear glut_max3_l.excitation
  ControlLinear iliacus_l.excitation
  ControlLinear psoas_l.excitation
  ControlLinear quad_fem_l.excitation
  ControlLinear gem_l.excitation
  ControlLinear peri_l.excitation
  ControlLinear rect_fem_l.excitation
  ControlLinear vas_int_l.excitation
  ControlLinear med_gas_l.excitation
  ControlLinear soleus_l.excitation
  ControlLinear tib_post_l.excitation
  ControlLinear tib_ant_l.excitation
  ControlLinear ercspn_r.excitation
  ControlLinear ercspn_l.excitation
  ControlLinear intobl_r.excitation
  ControlLinear intobl_l.excitation
  ControlLinear extobl_r.excitation
  ControlLinear extobl_l.excitation
