# OpenSim document version 20302
rdCMC_TaskSet leg39:
  rdCMC_Joint hip_angle_r: weight=(1 1 1) wrt_body=-1 express_body=-1 active=(true false false) kp=(100 1 1)
      kv=(20 1 1) ka=(1 1 1) r0=(0 0 0) r1=(0 0 0) r2=(0 0 0) coordinate=hip_angle_r limit=0
  rdCMC_Joint knee_angle_r: weight=(1 1 1) wrt_body=-1 express_body=-1 active=(true false false) kp=(100 1 1)
      kv=(20 1 1) ka=(1 1 1) r0=(0 0 0) r1=(0 0 0) r2=(0 0 0) coordinate=knee_angle_r limit=0
  rdCMC_Joint ankle_angle_r: weight=(1 1 1) wrt_body=-1 express_body=-1 active=(true false false) kp=(100 1 1)
      kv=(20 1 1) ka=(1 1 1) r0=(0 0 0) r1=(0 0 0) r2=(0 0 0) coordinate=ankle_angle_r limit=0
