# OpenSim document version 20302
ControlSet Control Set:
  defaults: ControlLinear default: is_model_control=true extrapolate=true default_min=0.02 default_max=1
      filter_on=false use_steps=true kp=100 kv=20
  ControlLinear [values shared by the 9 below unless stated]: is_model_control=true extrapolate=true default_min=0.02
      default_max=1 filter_on=false use_steps=true kp=100 kv=20
  ControlLinear bifemlh_r.excitation
  ControlLinear bifemsh_r.excitation
  ControlLinear glut_max2_r.excitation
  ControlLinear psoas_r.excitation
  ControlLinear rect_fem_r.excitation
  ControlLinear vas_int_r.excitation
  ControlLinear med_gas_r.excitation
  ControlLinear soleus_r.excitation
  ControlLinear tib_ant_r.excitation
