# OpenSim document version 20302
CMCTool:
  model_file: leg39.osim
  replace_force_set: false
  results_directory: ComputedMuscleControlResults
  output_precision: 20
  initial_time: -0.03
  final_time: 0.41
  solve_for_equilibrium_for_auxiliary_states: true
  maximum_number_of_integrator_steps: 30000
  maximum_integrator_step_size: 0.00025
  minimum_integrator_step_size: 0.00000001
  integrator_error_tolerance: 0.000005
  desired_kinematics_file: OutputReference/leg39_InverseKinematics_Uniform_Weights.mot
  task_set_file: leg39_ComputedMuscleControl_Tasks.xml
  constraints_file: leg39_ControlConstraints.xml
  lowpass_cutoff_frequency: 6
  cmc_time_window: 0.01
  use_curvature_filter: true
  use_fast_optimization_target: true
  optimizer_algorithm: ipopt
  optimizer_derivative_dx: 1
  optimizer_convergence_criterion: 0.1
  optimizer_max_iterations: 2000
  optimizer_print_level: 0
  use_verbose_printing: false
  AnalysisSet Analyses:
    Kinematics: start_time=-infinity end_time=infinity step_interval=10 in_degrees=true coordinates=all
    Actuation: start_time=-infinity end_time=infinity step_interval=10 in_degrees=true
