# OpenSim document version 20302
ForwardTool:
  model_file: leg39.osim
  replace_force_set: false
  results_directory: ForwardDynamicsResults
  output_precision: 20
  initial_time: 0
  final_time: 0.4
  solve_for_equilibrium_for_auxiliary_states: false
  maximum_number_of_integrator_steps: 30000
  maximum_integrator_step_size: 0.01
  minimum_integrator_step_size: 0.00000001
  integrator_error_tolerance: 0.000005
  states_file: leg39_InitialStates.sto
  use_specified_dt: false
  ControllerSet Controllers:
    ControlSetController: enable_controller=false controls_file=leg39_controls.xml
