# OpenSim document version 20302
IKTool:
  results_directory: ./
  model_file: leg39.osim
  constraint_weight: 20
  accuracy: 0.00001
  marker_file: leg39_swing.trc
  time_range: 0 0.4
  report_errors: true
  output_motion_file: leg39_InverseKinematics.mot
  IKTaskSet leg39_IK:
    IKMarkerTask R.Thigh.Upper: apply=true weight=1
    IKMarkerTask R.Thigh.Front: apply=true weight=1
    IKMarkerTask R.Thigh.Rear: apply=true weight=1
    IKMarkerTask R.Shank.Upper: apply=true weight=1
    IKMarkerTask R.Shank.Front: apply=true weight=1
    IKMarkerTask R.Shank.Rear: apply=true weight=1
    IKMarkerTask R.Heel: apply=true weight=0.01
    IKMarkerTask R.Midfoot.Lat: apply=true weight=0.01
    IKMarkerTask R.Toe.Tip: apply=true weight=100
