# OpenSim document version 20302
ForceSet leg69_RRA_Residuals_and_Motors:
  TorqueActuator MZ: min_control=-10000 max_control=10000 bodyA=pelvis bodyB=ground torque_is_global=true axis=(0 0 1)
      optimal_force=1
  PointActuator FX: min_control=-10000 max_control=10000 body=pelvis point=(-0.0592121 0 0) point_is_global=false
      direction=(1 0 0) force_is_global=true optimal_force=1
  PointActuator FY: min_control=-10000 max_control=10000 body=pelvis point=(-0.0592121 0 0) point_is_global=false
      direction=(0 1 0) force_is_global=true optimal_force=1
  CoordinateActuator hip_flexion_r_moment: min_control=-10000 max_control=10000 coordinate=hip_flexion_r
      optimal_force=10000
  CoordinateActuator knee_angle_r_moment: min_control=-10000 max_control=10000 coordinate=knee_angle_r
      optimal_force=10000
  CoordinateActuator ankle_angle_r_moment: min_control=-10000 max_control=10000 coordinate=ankle_angle_r
      optimal_force=100000
