# OpenSim document version 30000
CMCTool walk_subject:
  replace_force_set: false
  force_set_files: ../gait10dof_Reserve_Actuators.xml
  results_directory: ResultsCMC
  output_precision: 8
  initial_time: 0.6
  final_time: 1.9
  solve_for_equilibrium_for_auxiliary_states: true
  maximum_number_of_integrator_steps: 20000
  maximum_integrator_step_size: 1
  minimum_integrator_step_size: 1e-8
  integrator_error_tolerance: 1e-5
  external_loads_file: ../ExperimentalData/subject01_walk_grf.xml
  desired_kinematics_file: ../RRA/ResultsRRA/subject_adjusted_Kinematics_q.sto
  task_set_file: ../gait10dof_Kinematics_Tracking_Tasks.xml
  constraints_file: controls_43p_r.xml
  lowpass_cutoff_frequency: -1
  cmc_time_window: 0.01
  use_fast_optimization_target: true
  optimizer_algorithm: ipopt
  numerical_derivative_step_size: 1e-5
  optimization_convergence_tolerance: 1e-5
  optimizer_max_iterations: 1000
  optimizer_print_level: 0
  use_verbose_printing: false
  AnalysisSet Analyses:
    ProbeReporter MetabolicsReporter
