# OpenSim document version 40000
Model toy_with_forces:
  gravity: 0 -9.80665 0
  length_units: m
  force_units: N
  credits:
    Author: Matt DeMers License: Creative Commons (CCBY 3.0). You are free to distribute, remix, tweak, and build upon this work, even commercially, as long as you credit us for the original creation. http://creativecommons.org/licenses/by/3.0/
  Ground: meshes=checkered_floor.obj
  BodySet:
    Body block: mass=20 [kg] mass_center=(0 0 0) inertia=(0.533333 0.533333 0.533333 0 0 0) meshes=block.obj
    Body link1: mass=5 mass_center=(0 0.25 0) inertia=(8.333e-5 8e-6 8.333e-5 0 0 0) meshes=(block.obj sphere.obj)
    Body link2: mass=5 mass_center=(0 0.25 0) inertia=(8.333e-5 8e-6 8.333e-5 0 0 0) meshes=block.obj
  JointSet:
    FreeJoint ground_block: socket_parent_frame=ground_offset socket_child_frame=block_offset
      Coordinate xRotation: default_value=0 range=(-2 2) clamped=false
      Coordinate yRotation: default_value=0 range=(-2 2) clamped=false
      Coordinate zRotation: default_value=0.6981317 range=(-2 2) clamped=false
      Coordinate xTranslation: default_value=0.0002779835 range=(-10 10) clamped=true
      Coordinate yTranslation: default_value=1.1 range=(-10 10) clamped=true
      Coordinate zTranslation: default_value=0 range=(-10 10) clamped=true
      PhysicalOffsetFrame ground_offset: socket_parent=/ground translation=(0 0 0) [meters]
      PhysicalOffsetFrame block_offset: socket_parent=/bodyset/block translation=(0 0 0)
    PinJoint pin1: socket_parent_frame=block_offset socket_child_frame=link1_offset
      Coordinate pin1_rot: default_value=0 range=(-2 2) clamped=true
      PhysicalOffsetFrame block_offset: socket_parent=/bodyset/block translation=(0 0 0)
      PhysicalOffsetFrame link1_offset: socket_parent=/bodyset/link1 translation=(0 0.5 0)
    PinJoint pin2: socket_parent_frame=link1_offset socket_child_frame=link2_offset
      Coordinate pin2_rot: default_value=-1.396263 range=(-2 2) clamped=true
      PhysicalOffsetFrame link1_offset: socket_parent=/bodyset/link1 translation=(0 0 0)
      PhysicalOffsetFrame link2_offset: socket_parent=/bodyset/link2 translation=(0 0.5 0)
  ConstraintSet:
    PointOnLineConstraint lock_block_to_y_axis: socket_line_body=/ground socket_follower_body=/bodyset/block
        line_direction_vec=(0 1 0) point_on_line=(0 0 0) point_on_follower=(0 0 0)
    PointOnLineConstraint lock_foot_to_y_axis: socket_line_body=/ground socket_follower_body=/bodyset/link2
        line_direction_vec=(0 1 0) point_on_line=(0 0 0) point_on_follower=(0 0 0)
  ForceSet:
    HuntCrossleyForce foot_contact_force: transition_velocity=0.1
      ContactParametersSet contact_parameters:
        ContactParameters: geometry=(platform heel) stiffness=100000000 dissipation=0.5 static_friction=0.9
            dynamic_friction=0.9 viscous_friction=0.6
    PointToPointSpring spring: socket_body1=/bodyset/block socket_body2=/bodyset/link2 point1=(0 0 0) point2=(0 0 0)
        stiffness=2000 [N/m] rest_length=0.8 [m]
    CoordinateLimitForce knee_limit: coordinate=pin2_rot upper_stiffness=20 [N*m/degree] upper_limit=0 [degrees]
        lower_stiffness=20 [N*m/degree] lower_limit=-140 [degrees] damping=1 transition=5 [degrees]
    BushingForce hip_bushing: socket_frame1=/bodyset/block socket_frame2=link1_offset
        rotational_stiffness=(10 10 10) [Nm/rad] translational_stiffness=(0 0 0) [N/m]
        rotational_damping=(0.1 0.1 0.1) [Nm/(rad/s)] translational_damping=(0 0 0) [N/(m/s)]
      PhysicalOffsetFrame link1_offset: socket_parent=/bodyset/link1 translation=(0 0.5 0)
  ContactGeometrySet:
    ContactHalfSpace platform: socket_frame=/ground location=(0 0 0) orientation=(0 0 -1.570796)
    ContactSphere heel: socket_frame=/bodyset/link2 location=(0 0 0) radius=0.05
