# OpenSim document version 30000
Model toy_with_forces:
  length_units: m
  force_units: N
  gravity: 0 -9.80665 0
  credits:
    Author: Matt DeMers License: Creative Commons (CCBY 3.0). You are free to distribute, remix, tweak, and build upon this work, even commercially, as long as you credit us for the original creation. http://creativecommons.org/licenses/by/3.0/
  BodySet:
    Body ground: mass=0 mass_center=(0 0 0) inertia_xx=1 inertia_yy=1 inertia_zz=1 meshes=checkered_floor.vtp
    Body block: mass=20 mass_center=(0 0 0) inertia_xx=0.5333333 inertia_yy=0.5333333 inertia_zz=0.5333333
        meshes=big_block_centered.vtp
      FreeJoint ground_block: parent_body=ground location_in_parent=(0 0 0) location=(0 0 0)
        Coordinate xRotation: motion_type=rotational default_value=0 range=(-2 2) clamped=false
        Coordinate yRotation: motion_type=rotational default_value=0 range=(-2 2) clamped=false
        Coordinate zRotation: motion_type=rotational default_value=0.6981317 range=(-2 2) clamped=false
        Coordinate xTranslation: motion_type=translational default_value=0.0002779835 range=(-10 10) clamped=true
        Coordinate yTranslation: motion_type=translational default_value=1.1 range=(-10 10) clamped=true
        Coordinate zTranslation: motion_type=translational default_value=0 range=(-10 10) clamped=true
    Body link1: mass=5 mass_center=(0 0.25 0) inertia_xx=8.333e-5 inertia_yy=8e-6 inertia_zz=8.333e-5
        meshes=linkage1.vtp
      PinJoint pin1: parent_body=block location_in_parent=(0 0 0) location=(0 0.5 0)
        Coordinate pin1_rot: motion_type=rotational default_value=0 range=(-2 2) clamped=true
    Body link2: mass=5 mass_center=(0 0.25 0) inertia_xx=8.333e-5 inertia_yy=8e-6 inertia_zz=8.333e-5
        meshes=linkage1.vtp
      PinJoint pin2: parent_body=link1 location_in_parent=(0 0 0) location=(0 0.5 0)
        Coordinate pin2_rot: motion_type=rotational default_value=-1.396263 range=(-2 2) clamped=true
  ConstraintSet:
    PointOnLineConstraint lock_block_to_y_axis: line_body=ground line_direction_vec=(0 1 0) point_on_line=(0 0 0)
        follower_body=block point_on_follower=(0 0 0)
    PointOnLineConstraint lock_foot_to_y_axis: line_body=ground line_direction_vec=(0 1 0) point_on_line=(0 0 0)
        follower_body=link2 point_on_follower=(0 0 0)
  ForceSet:
    HuntCrossleyForce foot_contact_force: transition_velocity=0.1
      ContactParametersSet contact_parameters:
        ContactParameters: geometry=(platform heel) stiffness=100000000 dissipation=0.5 static_friction=0.9
            dynamic_friction=0.9 viscous_friction=0.6
    PointToPointSpring spring: body1=block body2=link2 point1=(0 0 0) point2=(0 0 0) stiffness=20 [N/m] rest_length=0.8
    CoordinateLimitForce knee_limit: coordinate=pin2_rot upper_stiffness=20 [N*m/degree] upper_limit=0 [degrees]
        lower_stiffness=20 [N*m/degree] lower_limit=-140 [degrees] damping=1 transition=5 [degrees]
    BushingForce hip_bushing: body_1=block body_2=link1 location_body_1=(0 0 0) orientation_body_1=(0 0 0)
        location_body_2=(0 0.5 0) orientation_body_2=(0 0 0) rotational_stiffness=(10 10 10) [Nm/rad]
        translational_stiffness=(0 0 0) [N/m] rotational_damping=(0.1 0.1 0.1) [Nm/(rad/s)]
        translational_damping=(0 0 0) [N/(m/s)]
  ContactGeometrySet:
    ContactHalfSpace platform: body_name=ground location=(0 0 0) orientation=(0 0 -1.570796)
    ContactSphere heel: body_name=link2 location=(0 0 0) radius=0.05
