# OpenSim document version 30516
Model double_pendulum:
  gravity: 0 -9.80665 0
  credits: Ajay Seth, Ayman Habib
  publications: For testing
  length_units: meters
  force_units: N
  Ground
  BodySet:
    Body rod1: mass=1 [kg] mass_center=(0 0 0) inertia=(0 0 0 0 0 0) meshes=(cylinder.vtp sphere.vtp)
    Body rod2: mass=1 mass_center=(0 0 0) inertia=(0 0 0 0 0 0) meshes=(cylinder.vtp sphere.vtp)
  JointSet:
    PinJoint pin1: socket_parent_frame_connectee_name=ground_offset socket_child_frame_connectee_name=rod1_offset
      Coordinate q1: default_value=-0.7853982 range=(-1.570796 1.570796) clamped=false
      PhysicalOffsetFrame ground_offset: socket_parent_connectee_name=../../ground translation=(0 1.1 0) [meters]
      PhysicalOffsetFrame rod1_offset: socket_parent_connectee_name=../../rod1 translation=(0 0.5 0)
    PinJoint pin2: socket_parent_frame_connectee_name=../rod1 socket_child_frame_connectee_name=rod2_offset
      Coordinate q2: default_value=-1.047198 range=(-1.570796 1.570796) clamped=false
      PhysicalOffsetFrame rod2_offset: socket_parent_connectee_name=../../rod2 translation=(0 0.5 0)
  ForceSet:
    CoordinateActuator Torq1: coordinate=q1 optimal_force=1
    CoordinateActuator Torq2: coordinate=q2 optimal_force=1
