# OpenSim document version 30000
Model double_pendulum:
  credits: Ajay Seth
  publications: For testing
  length_units: meters
  force_units: N
  gravity: 0 -9.80665 0
  BodySet:
    Body ground: mass=0 mass_center=(0 0 0) inertia_xx=0 inertia_yy=0 inertia_zz=0 meshes=Unassigned
    Body pendulum: mass=1 mass_center=(0 0 0) inertia_xx=0 inertia_yy=0 inertia_zz=0
      SliderJoint p_g: parent_body=ground location_in_parent=(0 0 0) orientation_in_parent=(0 0 1.5708)
          location=(0 0 0)
        Coordinate t1: motion_type=translational default_value=1 range=(-1 1) clamped=true locked=true
    Body rod1: mass=1 mass_center=(0 0 0) inertia_xx=0 inertia_yy=0 inertia_zz=0 meshes=(cylinder.vtp sphere.vtp)
      PinJoint pin1: parent_body=pendulum location_in_parent=(0 0 0) orientation_in_parent=(0 0 -1.5708)
          location=(0 0.5 0)
        Coordinate q1: motion_type=rotational default_value=-0.09239773 range=(-1.570796 1.570796) clamped=false
    Body rod2: mass=1 mass_center=(0 0 0) inertia_xx=0 inertia_yy=0 inertia_zz=0 meshes=(cylinder.vtp sphere.vtp)
      PinJoint pin2: parent_body=rod1 location_in_parent=(0 0 0) location=(0 0.5 0)
        Coordinate q2: motion_type=rotational default_value=1.201205 range=(-1.570796 1.570796) clamped=false
  ForceSet:
    CoordinateActuator Torq1: coordinate=q1 optimal_force=1
    CoordinateActuator Torq2: coordinate=q2 optimal_force=1
