# OpenSim document version 40000
Model Tug_of_War:
  gravity: 0 -9.80665 0
  length_units: meters
  force_units: N
  credits:
    Author: The OpenSim Teams License: Creative Commons (CCBY 3.0). You are free to distribute, remix, tweak, and build upon this work, even commercially, as long as you credit us for the original creation. http://creativecommons.org/licenses/by/3.0/
  Ground: meshes=(block.vtp checkered_floor.vtp)
  BodySet:
    Body block: mass=20 [kg] mass_center=(0 0 0) inertia=(0.133333 0.133333 0.133333 0 0 0) meshes=block.vtp
  JointSet:
    SliderJoint ground_block: socket_parent_frame=ground_offset socket_child_frame=block_offset
      Coordinate block_tz: default_value=0 range=(-0.3 0.3) clamped=true
      PhysicalOffsetFrame ground_offset: socket_parent=/ground translation=(0 0 0) [meters]
          orientation=(0 -1.5708 0) [radians]
      PhysicalOffsetFrame block_offset: socket_parent=/bodyset/block translation=(0 -0.05 0) orientation=(0 -1.5708 0)
  ForceSet:
    Thelen2003Muscle muscle1: optimal_force=1 max_isometric_force=1000 optimal_fiber_length=0.1 tendon_slack_length=0.2
        pennation_angle_at_optimal=0 [radians] default_activation=1 default_fiber_length=0.25
      PathPoint point1: ground (0 0.05 -0.35)
      PathPoint point2: block (0 0 -0.05)
    Thelen2003Muscle muscle2: optimal_force=1 max_isometric_force=1000 optimal_fiber_length=0.1 tendon_slack_length=0.2
        pennation_angle_at_optimal=0 default_activation=0.05 default_fiber_length=0.25
      PathPoint point1: ground (0 0.05 0.35)
      PathPoint point2: block (0 0 0.05)
