# OpenSim document version 40000
Model Tug_of_War_Millard:
  gravity: 0 -9.80665 0
  length_units: meters
  force_units: N
  credits:
    Author: The OpenSim Teams License: Creative Commons (CCBY 3.0). You are free to distribute, remix, tweak, and build upon this work, even commercially, as long as you credit us for the original creation. http://creativecommons.org/licenses/by/3.0/
  Ground: meshes=(block.vtp checkered_floor.vtp)
  BodySet:
    Body block: mass=20 [kg] mass_center=(0 0 0) inertia=(0.133333 0.133333 0.133333 0 0 0) meshes=block.vtp
  JointSet:
    SliderJoint ground_block: socket_parent_frame=ground_offset socket_child_frame=block_offset
      Coordinate block_tz: default_value=0 range=(-0.3 0.3) clamped=true
      PhysicalOffsetFrame ground_offset: socket_parent=/ground translation=(0 0 0) [meters]
          orientation=(0 -1.5708 0) [radians]
      PhysicalOffsetFrame block_offset: socket_parent=/bodyset/block translation=(0 -0.05 0) orientation=(0 -1.5708 0)
  ForceSet:
    Millard2012EquilibriumMuscle RightMuscle: optimal_force=1 max_isometric_force=1000 optimal_fiber_length=0.1
        tendon_slack_length=0.2 pennation_angle_at_optimal=0 [radians] max_contraction_velocity=10 default_activation=1
        default_fiber_length=0.1 activation_time_constant=0.01 [seconds] deactivation_time_constant=0.04 [seconds]
      PathPoint muscle1-point1: ground (0 0.05 -0.35)
      PathPoint muscle1-point2: block (0 0 -0.05)
      ActiveForceLengthCurve: min_norm_active_fiber_length=0.4441 transition_norm_fiber_length=0.6259
          max_norm_active_fiber_length=1.8123 shallow_ascending_slope=0.8616 minimum_value=0
      ForceVelocityCurve: concentric_slope_at_vmax=0 concentric_slope_near_vmax=0.25 isometric_slope=5
          eccentric_slope_at_vmax=0 eccentric_slope_near_vmax=0.15 max_eccentric_velocity_force_multiplier=1.4
      FiberForceLengthCurve: strain_at_zero_force=0 strain_at_one_norm_force=0.6
      TendonForceLengthCurve: strain_at_one_norm_force=0.049
    Millard2012EquilibriumMuscle LeftMuscle: optimal_force=1 max_isometric_force=1000 optimal_fiber_length=0.1
        tendon_slack_length=0.2 pennation_angle_at_optimal=0 max_contraction_velocity=10 default_activation=1
        default_fiber_length=0.1 activation_time_constant=0.01 deactivation_time_constant=0.04
      PathPoint muscle2-point1: ground (0 0.05 0.35)
      PathPoint muscle2-point2: block (0 0 0.05)
      ActiveForceLengthCurve: min_norm_active_fiber_length=0.4441 transition_norm_fiber_length=0.6259
          max_norm_active_fiber_length=1.8123 shallow_ascending_slope=0.8616 minimum_value=0
      ForceVelocityCurve: concentric_slope_at_vmax=0 concentric_slope_near_vmax=0.25 isometric_slope=5
          eccentric_slope_at_vmax=0 eccentric_slope_near_vmax=0.15 max_eccentric_velocity_force_multiplier=1.4
      FiberForceLengthCurve: strain_at_zero_force=0 strain_at_one_norm_force=0.6
      TendonForceLengthCurve: strain_at_one_norm_force=0.049
