# OpenSim document version 40000
Model WalkerModel:
  gravity: 0 -9.80665 0
  credits: Daniel A. Jacobs, Ajay Seth
  length_units: meters
  force_units: N
  Ground
  BodySet:
    Body Platform: mass=1 [kg] mass_center=(0 0 0) inertia=(1 1 1 0 0 0) meshes=box.vtp
    Body Pelvis: mass=0.5 mass_center=(0 0 0) inertia=(0.0001 0.00666667 0.0001 0 0 0) meshes=sphere.vtp
    Body LeftThigh: mass=0.05 mass_center=(0 0 0) inertia=(0.0001 0.0001 0.00104167 0 0 0) meshes=sphere.vtp
    Body RightThigh: mass=0.05 mass_center=(0 0 0) inertia=(0.0001 0.0001 0.00104167 0 0 0) meshes=sphere.vtp
    Body LeftShank: mass=0.05 mass_center=(0 0 0) inertia=(0.0001 0.0001 0.00104167 0 0 0) meshes=sphere.vtp
    Body RightShank: mass=0.05 mass_center=(0 0 0) inertia=(0.0001 0.0001 0.00104167 0 0 0) meshes=sphere.vtp
  JointSet:
    WeldJoint PlatformToGround: socket_parent_frame=ground_offset socket_child_frame=Platform_offset
      PhysicalOffsetFrame ground_offset: socket_parent=/ground translation=(0 0 0) [meters]
          orientation=(0 0 -0.174533) [radians]
      PhysicalOffsetFrame Platform_offset: socket_parent=/bodyset/Platform translation=(0 0 0)
    PlanarJoint PelvisToPlatform: socket_parent_frame=ground_offset socket_child_frame=Pelvis_offset
      Coordinate Pelvis_rx: default_value=0 range=(-3.14 3.14) clamped=false
      Coordinate Pelvis_tx: default_value=0 range=(-10 10) clamped=false
      Coordinate Pelvis_ty: default_value=0 range=(-1 2) clamped=false
      PhysicalOffsetFrame ground_offset: socket_parent=/ground translation=(0 1 0)
      PhysicalOffsetFrame Pelvis_offset: socket_parent=/bodyset/Pelvis translation=(0 0 0)
    PinJoint LThighToPelvis: socket_parent_frame=Pelvis_offset socket_child_frame=LeftThigh_offset
      Coordinate LHip_rz: default_value=1.047198 range=(-1.745329 1.745329)
      PhysicalOffsetFrame Pelvis_offset: socket_parent=/bodyset/Pelvis translation=(0 0 -0.2)
      PhysicalOffsetFrame LeftThigh_offset: socket_parent=/bodyset/LeftThigh translation=(0 0.25 0)
    PinJoint RThighToPelvis: socket_parent_frame=Pelvis_offset socket_child_frame=RightThigh_offset
      Coordinate RHip_rz: default_value=0 range=(-1.745329 1.745329)
      PhysicalOffsetFrame Pelvis_offset: socket_parent=/bodyset/Pelvis translation=(0 0 0.2)
      PhysicalOffsetFrame RightThigh_offset: socket_parent=/bodyset/RightThigh translation=(0 0.25 0)
    PinJoint LShankToLThigh: socket_parent_frame=LeftThigh_offset socket_child_frame=LeftShank_offset
      Coordinate LKnee_rz: default_value=0 range=(-2.443461 0)
      PhysicalOffsetFrame LeftThigh_offset: socket_parent=/bodyset/LeftThigh translation=(0 -0.25 0)
      PhysicalOffsetFrame LeftShank_offset: socket_parent=/bodyset/LeftShank translation=(0 0.25 0)
    PinJoint RShankToRThigh: socket_parent_frame=RightThigh_offset socket_child_frame=RightShank_offset
      Coordinate RKnee_rz: default_value=0 range=(-2.443461 0)
      PhysicalOffsetFrame RightThigh_offset: socket_parent=/bodyset/RightThigh translation=(0 -0.25 0)
      PhysicalOffsetFrame RightShank_offset: socket_parent=/bodyset/RightShank translation=(0 0.25 0)
  ForceSet:
    HuntCrossleyForce LFootForce: transition_velocity=0.2
      ContactParametersSet contact_parameters:
        ContactParameters: geometry=(LFootContact PlatformContact) stiffness=1000000 dissipation=1 static_friction=0.8
            dynamic_friction=0.4 viscous_friction=0.4
    HuntCrossleyForce RFootForce: transition_velocity=0.2
      ContactParametersSet contact_parameters:
        ContactParameters: geometry=(RFootContact PlatformContact) stiffness=1000000 dissipation=1 static_friction=0.8
            dynamic_friction=0.4 viscous_friction=0.4
    HuntCrossleyForce LKneeForce: transition_velocity=0.2
      ContactParametersSet contact_parameters:
        ContactParameters: geometry=(LKneeContact PlatformContact) stiffness=1000000 dissipation=1 static_friction=0.8
            dynamic_friction=0.4 viscous_friction=0.4
    HuntCrossleyForce RKneeForce: transition_velocity=0.2
      ContactParametersSet contact_parameters:
        ContactParameters: geometry=(RKneeContact PlatformContact) stiffness=1000000 dissipation=1 static_friction=0.8
            dynamic_friction=0.4 viscous_friction=0.4
    HuntCrossleyForce LHipForce: transition_velocity=0.2
      ContactParametersSet contact_parameters:
        ContactParameters: geometry=(LHipContact PlatformContact) stiffness=1000000 dissipation=1 static_friction=0.8
            dynamic_friction=0.4 viscous_friction=0.4
    HuntCrossleyForce RHipForce: transition_velocity=0.2
      ContactParametersSet contact_parameters:
        ContactParameters: geometry=(RHipContact PlatformContact) stiffness=1000000 dissipation=1 static_friction=0.8
            dynamic_friction=0.4 viscous_friction=0.4
    CoordinateLimitForce LKneeLimitTorque: coordinate=LKnee_rz upper_stiffness=0.5 [N*m/degree] upper_limit=0 [degrees]
        lower_stiffness=0.5 [N*m/degree] lower_limit=-140 [degrees] damping=0.025 transition=5 [degrees]
        compute_dissipation_energy=false
    CoordinateLimitForce RKneeLimitTorque: coordinate=RKnee_rz upper_stiffness=0.5 upper_limit=0 lower_stiffness=0.5
        lower_limit=-140 damping=0.025 transition=5 compute_dissipation_energy=false
    CoordinateLimitForce LHipLimitTorque: coordinate=LHip_rz upper_stiffness=0.5 upper_limit=100 lower_stiffness=0.5
        lower_limit=-100 damping=0.025 transition=5 compute_dissipation_energy=false
    CoordinateLimitForce RHipLimitTorque: coordinate=RHip_rz upper_stiffness=0.5 upper_limit=100 lower_stiffness=0.5
        lower_limit=-100 damping=0.025 transition=5 compute_dissipation_energy=false
  ContactGeometrySet:
    ContactSphere LFootContact: socket_frame=/bodyset/LeftShank location=(0 -0.2 0) radius=0.05
    ContactSphere RFootContact: socket_frame=/bodyset/RightShank location=(0 -0.2 0) radius=0.05
    ContactSphere LKneeContact: socket_frame=/bodyset/LeftShank location=(0 0.25 0) radius=0.05
    ContactSphere RKneeContact: socket_frame=/bodyset/RightShank location=(0 0.25 0) radius=0.05
    ContactSphere LHipContact: socket_frame=/bodyset/Pelvis location=(0 0 -0.2) radius=0.05
    ContactSphere RHipContact: socket_frame=/bodyset/Pelvis location=(0 0 0.2) radius=0.05
    ContactHalfSpace PlatformContact: socket_frame=/bodyset/Platform location=(0 0.025 0) orientation=(0 0 -1.570796)
