# OpenSim document version 20302
ForceSet gait2392_CMC:
  defaults:
    PointActuator default: point=(0 0 0) point_is_global=false direction=(1 0 0) force_is_global=true
        optimal_force=1000
    TorqueActuator default: torque_is_global=true axis=(1 0 0) optimal_force=1000
  PointActuator FX: min_control=-1000 max_control=1000 body=pelvis point=(-0.0724376 0 0) point_is_global=false
      direction=(-1 0 0) force_is_global=true optimal_force=1
  PointActuator FY: min_control=-1000 max_control=1000 body=pelvis point=(-0.0724376 0 0) point_is_global=false
      direction=(0 -1 0) force_is_global=true optimal_force=1
  PointActuator FZ: min_control=-1000 max_control=1000 body=pelvis point=(-0.0724376 0 0) point_is_global=false
      direction=(0 0 -1) force_is_global=true optimal_force=1
  TorqueActuator MX: min_control=-1000 max_control=1000 bodyA=pelvis bodyB=ground torque_is_global=true axis=(-1 0 0)
      optimal_force=1
  TorqueActuator MY: min_control=-1000 max_control=1000 bodyA=pelvis bodyB=ground torque_is_global=true axis=(0 -1 0)
      optimal_force=1
  TorqueActuator MZ: min_control=-1000 max_control=1000 bodyA=pelvis bodyB=ground torque_is_global=true axis=(0 0 -1)
      optimal_force=1
