# OpenSim document version 30000
InverseKinematicsTool run:
  results_directory: ResultsIK
  model_file: subject01_registered.osim
  constraint_weight: Inf
  accuracy: 0.0001
  marker_file: subject02_running.trc
  time_range: 0 9.983
  report_errors: true
  output_motion_file: ./ResultsIK/subject02_running_ik.mot
  report_marker_locations: true
  IKTaskSet subject03_IK:
    IKMarkerTask Sternum: apply=true weight=1
    IKMarkerTask R.Acromium: apply=true weight=10
    IKMarkerTask L.Acromium: apply=true weight=10
    IKMarkerTask R.ASIS: apply=true weight=50
    IKMarkerTask L.ASIS: apply=true weight=50
    IKMarkerTask V.Sacral: apply=true weight=50
    IKMarkerTask R.Thigh.Upper: apply=true weight=10
    IKMarkerTask R.Thigh.Front: apply=true weight=10
    IKMarkerTask R.Thigh.Rear: apply=true weight=10
    IKMarkerTask R.Shank.Upper: apply=true weight=10
    IKMarkerTask R.Shank.Front: apply=true weight=10
    IKMarkerTask R.Shank.Rear: apply=true weight=10
    IKMarkerTask R.Heel: apply=true weight=50
    IKMarkerTask R.Midfoot.Sup: apply=true weight=10
    IKMarkerTask R.Midfoot.Lat: apply=true weight=10
    IKMarkerTask R.Toe.Lat: apply=true weight=10
    IKMarkerTask R.Toe.Med: apply=true weight=10
    IKMarkerTask R.Toe.Tip: apply=true weight=50
    IKMarkerTask R.Bicep: apply=true weight=10
    IKMarkerTask R.Elbow: apply=true weight=20
    IKMarkerTask R.Wrist.Med: apply=true weight=20
    IKMarkerTask R.Wrist.Lat: apply=true weight=20
    IKMarkerTask L.Thigh.Upper: apply=true weight=10
    IKMarkerTask L.Thigh.Front: apply=true weight=10
    IKMarkerTask L.Thigh.Rear: apply=true weight=10
    IKMarkerTask L.Shank.Upper: apply=true weight=10
    IKMarkerTask L.Shank.Front: apply=true weight=10
    IKMarkerTask L.Shank.Rear: apply=true weight=10
    IKMarkerTask L.Heel: apply=true weight=50
    IKMarkerTask L.Midfoot.Sup: apply=true weight=10
    IKMarkerTask L.Midfoot.Lat: apply=true weight=10
    IKMarkerTask L.Toe.Lat: apply=true weight=10
    IKMarkerTask L.Toe.Med: apply=true weight=10
    IKMarkerTask L.Toe.Tip: apply=true weight=50
    IKMarkerTask L.Bicep: apply=false weight=0
    IKMarkerTask L.Elbow: apply=true weight=20
    IKMarkerTask L.Wrist.Med: apply=true weight=20
    IKMarkerTask L.Wrist.Lat: apply=true weight=20
