# OpenSim document version 30000
CMCTool cmc:
  model_file: subject01_RRA_Adjusted.osim
  replace_force_set: false
  force_set_files: Actuators_CMC.xml
  results_directory: ./Results_CMC
  output_precision: 8
  initial_time: 0.84
  final_time: 1.14
  solve_for_equilibrium_for_auxiliary_states: false
  maximum_number_of_integrator_steps: 30000
  maximum_integrator_step_size: 1
  minimum_integrator_step_size: 1e-8
  integrator_error_tolerance: 1e-5
  external_loads_file: externalLoads_run.xml
  desired_kinematics_file: ./Results_RRA/rra_run_1_Kinematics_q.sto
  task_set_file: Tasks_CMC.xml
  constraints_file: Control_Constraints_CMC.xml
  lowpass_cutoff_frequency: -1
  cmc_time_window: 0.01
  use_fast_optimization_target: true
  optimizer_algorithm: ipopt
  numerical_derivative_step_size: 0.0001
  optimization_convergence_tolerance: 0.0001
  optimizer_max_iterations: 2000
  optimizer_print_level: 0
  use_verbose_printing: false
  AnalysisSet Analyses:
    Kinematics: coordinates=all start_time=0 end_time=10 step_interval=10 in_degrees=true
    Actuation: start_time=0 end_time=10 step_interval=10 in_degrees=true
    MuscleAnalysis: start_time=0 end_time=10 step_interval=1 muscle_list=all
        moment_arm_coordinate_list=(hip_flexion_r knee_angle_r ankle_angle_r) compute_moments=true
