# OpenSim document version 30000
ScaleTool subject_scale_run:
  mass: 72.84 [kg]
  height: 1800
  age: 25
  notes: Scale and Registration Setup file for Rajagopol model
  GenericModelMaker:
    model_file: Rajagopal2015.osim
    marker_set_file: subject01_static.trc
  ModelScaler:
    apply: true
    scaling_order: measurements manualScale
    marker_file: subject01_static.trc
    time_range: 0 3.96
    preserve_mass_distribution: true
    output_model_file: subject01_scaled.osim
    MeasurementSet marker_measurements:
      Measurement torso: apply=true
        MarkerPair: markers=(RASI CLAV)
        MarkerPair: markers=(LASI CLAV)
        MarkerPair: markers=(LPSI C7)
        MarkerPair: markers=(RPSI C7)
        MarkerPair: markers=(RASI RACR)
        MarkerPair: markers=(LASI LACR)
        BodyScale torso: axes=(X Y Z)
      Measurement pelvis_X: apply=true
        MarkerPair: markers=(RASI RPSI)
        MarkerPair: markers=(LASI LPSI)
        BodyScale pelvis: axes=X
      Measurement pelvis_Y: apply=true
        MarkerPair: markers=(LPSI LHJC)
        MarkerPair: markers=(RPSI RHJC)
        MarkerPair: markers=(RASI RHJC)
        MarkerPair: markers=(LASI LHJC)
        BodyScale pelvis: axes=Y
      Measurement pelvis_z: apply=true
        MarkerPair: markers=(RPSI LPSI)
        MarkerPair: markers=(RASI LASI)
        BodyScale pelvis: axes=Z
      Measurement thigh: apply=true
        MarkerPair: markers=(LHJC LLFC)
        MarkerPair: markers=(LHJC LMFC)
        MarkerPair: markers=(RHJC RMFC)
        MarkerPair: markers=(RHJC RLFC)
        BodyScale femur_r: axes=(X Y Z)
        BodyScale femur_l: axes=(X Y Z)
      Measurement shank: apply=true
        MarkerPair: markers=(LLFC LLMAL)
        MarkerPair: markers=(LMFC LMMAL)
        MarkerPair: markers=(RLFC RLMAL)
        MarkerPair: markers=(RMFC RMMAL)
        BodyScale tibia_r: axes=(X Y Z)
        BodyScale tibia_l: axes=(X Y Z)
      Measurement foot: apply=true
        MarkerPair: markers=(LCAL LMT5)
        MarkerPair: markers=(LCAL LTOE)
        MarkerPair: markers=(RCAL RTOE)
        MarkerPair: markers=(RCAL RMT5)
        BodyScale talus_r: axes=(X Y Z)
        BodyScale calcn_r: axes=(X Y Z)
        BodyScale toes_r: axes=(X Y Z)
        BodyScale talus_l: axes=(X Y Z)
        BodyScale calcn_l: axes=(X Y Z)
        BodyScale toes_l: axes=(X Y Z)
      Measurement humerus: apply=true
        MarkerPair: markers=(LSJC LMEL)
        MarkerPair: markers=(LSJC LLEL)
        MarkerPair: markers=(RSJC RLEL)
        MarkerPair: markers=(RSJC RMEL)
        BodyScale humerus_r: axes=(X Y Z)
        BodyScale humerus_l: axes=(X Y Z)
      Measurement radius_ulna: apply=true
        MarkerPair: markers=(LLEL LFAradius)
        MarkerPair: markers=(LMEL LFAulna)
        MarkerPair: markers=(RMEL RFAulna)
        MarkerPair: markers=(RLEL RFAradius)
        BodyScale ulna_r: axes=(X Y Z)
        BodyScale radius_r: axes=(X Y Z)
        BodyScale hand_r: axes=(X Y Z)
        BodyScale ulna_l: axes=(X Y Z)
        BodyScale radius_l: axes=(X Y Z)
        BodyScale hand_l: axes=(X Y Z)
  MarkerPlacer:
    apply: true
    marker_file: subject01_static.trc
    time_range: 0 3.96
    output_model_file: subject01_registered.osim
    max_marker_movement: -1
    IKTaskSet scale_ik_run:
      IKMarkerTask RACR: apply=true weight=100
      IKMarkerTask LACR: apply=true weight=100
      IKMarkerTask C7: apply=true weight=250
      IKMarkerTask CLAV: apply=true weight=250
      IKMarkerTask RASH: apply=true weight=10
      IKMarkerTask RPSH: apply=true weight=10
      IKMarkerTask LASH: apply=true weight=10
      IKMarkerTask LPSH: apply=true weight=10
      IKMarkerTask RSJC: apply=false weight=10
      IKMarkerTask RLEL: apply=true weight=50
      IKMarkerTask RMEL: apply=true weight=50
      IKMarkerTask RFAradius: apply=true weight=50
      IKMarkerTask RFAulna: apply=true weight=50
      IKMarkerTask LSJC: apply=false weight=10
      IKMarkerTask LLEL: apply=true weight=50
      IKMarkerTask LMEL: apply=true weight=50
      IKMarkerTask LFAradius: apply=true weight=50
      IKMarkerTask LFAulna: apply=true weight=50
      IKMarkerTask RASI: apply=true weight=100
      IKMarkerTask LASI: apply=true weight=100
      IKMarkerTask RPSI: apply=true weight=50
      IKMarkerTask LPSI: apply=true weight=50
      IKMarkerTask LHJC: apply=true weight=100
      IKMarkerTask RHJC: apply=true weight=100
      IKMarkerTask RLFC: apply=true weight=50
      IKMarkerTask RMFC: apply=true weight=50
      IKMarkerTask RKJC: apply=false weight=100
      IKMarkerTask RLMAL: apply=true weight=50
      IKMarkerTask RMMAL: apply=true weight=50
      IKMarkerTask RAJC: apply=false weight=100
      IKMarkerTask RCAL: apply=true weight=25
      IKMarkerTask RTOE: apply=true weight=25
      IKMarkerTask RMT5: apply=true weight=25
      IKMarkerTask LLFC: apply=true weight=50
      IKMarkerTask LMFC: apply=true weight=50
      IKMarkerTask LKJC: apply=false weight=100
      IKMarkerTask LLMAL: apply=true weight=50
      IKMarkerTask LMMAL: apply=true weight=50
      IKMarkerTask LAJC: apply=false weight=100
      IKMarkerTask LCAL: apply=true weight=25
      IKMarkerTask LTOE: apply=true weight=25
      IKMarkerTask LMT5: apply=true weight=25
