# OpenSim document version 30000
ForwardTool Tug_of_War:
  replace_force_set: false
  results_directory: ForrwardResults
  output_precision: 8
  initial_time: 0
  final_time: 1
  solve_for_equilibrium_for_auxiliary_states: true
  maximum_number_of_integrator_steps: 20000
  maximum_integrator_step_size: 1
  minimum_integrator_step_size: 1e-8
  integrator_error_tolerance: 1e-5
  states_file: Tug_of_War_initial_states.sto
  use_specified_dt: false
  ControllerSet Controllers:
    ControlSetController: controls_file=Tug_of_War_controls.xml
