# OpenSim document version 20302
AnalyzeTool subject01:
  model_file: subject01_adjusted_StaticOp.osim
  replace_force_set: false
  force_set_files: gait2392_SO_weak_Residual_Actuators.xml
  results_directory: ResultsStaticOptimization
  output_precision: 20
  initial_time: 0.5
  final_time: 1.999
  solve_for_equilibrium_for_auxiliary_states: false
  maximum_number_of_integrator_steps: 20000
  maximum_integrator_step_size: 1
  minimum_integrator_step_size: 0.00000001
  integrator_error_tolerance: 0.00001
  external_loads_file: foot_floor_loads.xml
  coordinates_file: subject01_walk1_Kinematics.sto
  lowpass_cutoff_frequency_for_coordinates: -1
  AnalysisSet Analyses:
    JointReaction: start_time=0.5 end_time=1.999 step_interval=10 in_degrees=true
        forces_file=ResultsStaticOptimization\subject01_StaticOptimization_force.sto
        joint_names=(ground_pelvis hip_r hip_r) apply_on_bodies=(child child parent)
        express_in_frame=(ground child child)
