# OpenSim document version 30000
AnalyzeTool double_pendulum:
  replace_force_set: false
  results_directory: out
  output_precision: 8
  initial_time: 0
  final_time: 2
  solve_for_equilibrium_for_auxiliary_states: false
  maximum_number_of_integrator_steps: 20000
  maximum_integrator_step_size: 1
  minimum_integrator_step_size: 1e-8
  integrator_error_tolerance: 1e-5
  coordinates_file: double_pendulum_run.sto
  lowpass_cutoff_frequency_for_coordinates: -1
  AnalysisSet Analyses:
    PointKinematics: start_time=0 end_time=2 step_interval=1 in_degrees=true body_name=rod2
        relative_to_body_name=ground point_name=COM point=(0 0 0)
