# OpenSim document version 20302
ControlSet Control Set:
  defaults: ControlLinear default: is_model_control=true extrapolate=true default_min=0.02 default_max=1
      filter_on=false use_steps=true kp=100 kv=20
  ControlLinear [values shared by the 54 below unless stated]: is_model_control=true extrapolate=true default_min=0.02
      default_max=1 filter_on=false use_steps=true kp=100 kv=20
  ControlLinear glut_med1_r.excitation
  ControlLinear glut_med2_r.excitation
  ControlLinear glut_med3_r.excitation
  ControlLinear bifemlh_r.excitation
  ControlLinear bifemsh_r.excitation
  ControlLinear sar_r.excitation
  ControlLinear add_mag2_r.excitation
  ControlLinear tfl_r.excitation
  ControlLinear pect_r.excitation
  ControlLinear grac_r.excitation
  ControlLinear glut_max1_r.excitation
  ControlLinear glut_max2_r.excitation
  ControlLinear glut_max3_r.excitation
  ControlLinear iliacus_r.excitation
  ControlLinear psoas_r.excitation
  ControlLinear quad_fem_r.excitation
  ControlLinear gem_r.excitation
  ControlLinear peri_r.excitation
  ControlLinear rect_fem_r.excitation
  ControlLinear vas_int_r.excitation
  ControlLinear med_gas_r.excitation
  ControlLinear soleus_r.excitation
  ControlLinear tib_post_r.excitation
  ControlLinear tib_ant_r.excitation
  ControlLinear glut_med1_l.excitation
  ControlLinear glut_med2_l.excitation
  ControlLinear glut_med3_l.excitation
  ControlLinear bifemlh_l.excitation
  ControlLinear bifemsh_l.excitation
  ControlLinear sar_l.excitation
  ControlLinear add_mag2_l.excitation
  ControlLinear tfl_l.excitation
  ControlLinear pect_l.excitation
  ControlLinear grac_l.excitation
  ControlLinear glut_max1_l.excitation
  ControlLinear glut_max2_l.excitation
  ControlLinear glut_max3_l.excitation
  ControlLinear iliacus_l.excitation
  ControlLinear psoas_l.excitation
  ControlLinear quad_fem_l.excitation
  ControlLinear gem_l.excitation
  ControlLinear peri_l.excitation
  ControlLinear rect_fem_l.excitation
  ControlLinear vas_int_l.excitation
  ControlLinear med_gas_l.excitation
  ControlLinear soleus_l.excitation
  ControlLinear tib_post_l.excitation
  ControlLinear tib_ant_l.excitation
  ControlLinear ercspn_r.excitation
  ControlLinear ercspn_l.excitation
  ControlLinear intobl_r.excitation
  ControlLinear intobl_l.excitation
  ControlLinear extobl_r.excitation
  ControlLinear extobl_l.excitation
